a := 0.5
Radius := 0.2
q1 := 0, 0.1 .. 2*π
l1 := 0.2
alpha0 := asin(l1/a)
l_3 := 0.8
xcpr(q1) := -Radius/sqrt(1 - (l1*cos(q1))^2/(l1^2 + 2*l1*a*sin(q1) + a^2))*(-1/2*cos(q1)*2*l1*l1*cos(q1)/(l1^2 + 2*l1*a*sin(q1) + a^2)*a/sqrt(l1^2 + 2*l1*a*sin(q1) + a^2) + (-sin(q1)*l1*sqrt(l1^2 + 2*l1*a*sin(q1) + a^2)/(l1^2 + 2*l1*a*sin(q1) + a^2)))
phi3(q1) := acos(l1*cos(q1)/sqrt(l1^2 + 2*l1*sin(q1)*a + a^2))
alpha(q1) := phi3(q1) - π/2
U(q1) := sqrt(l1^2 + a^2 + 2*a*l1*sin(q1))
xc(q1) := (alpha0 + alpha(q1))*Radius
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phi3'(q1) := l1*cos(phi3(q1) - q1)/U(q1)
dU(q1) := d/dq1(U(q1))
dxc(q1) := d/dq1(xc(q1))
U'(q1) := l1*sin(phi3(q1) - q1)
dphi3(q1) := d/dq1(phi3(q1))
xc'(q1) := phi3'(q1)*Radius
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A1(q1) := -l1*cos(q1) + sin(phi3(q1))*phi3'(q1)*U'(q1) + cos(phi3(q1))*phi3'(q1)^2*U(q1) + U'(q1)*sin(phi3(q1))*phi3'(q1)
A2(q1) := -sin(q1)*l1 - cos(phi3(q1))*phi3'(q1)*U'(q1) + sin(phi3(q1))*phi3'(q1)^2*U(q1) - U'(q1)*cos(phi3(q1))*phi3'(q1)
phi3''(q1) := det([cos(phi3(q1)), A1(q1); sin(phi3(q1)), A2(q1)])/det([cos(phi3(q1)), -sin(phi3(q1))*U(q1); sin(phi3(q1)), cos(phi3(q1))*U(q1)])
U''(q1) := det([A1(q1), -sin(phi3(q1))*U(q1); A2(q1), cos(phi3(q1))*U(q1)])/det([cos(phi3(q1)), -sin(phi3(q1))*U(q1); sin(phi3(q1)), cos(phi3(q1))*U(q1)])
xc''(q1) := phi3''(q1)*Radius
ddx(q1) := phi3''(q1)*Radius
ddU(q1) := d/dq1(dU(q1))
ddphi3(q1) := d/dq1(dphi3(q1))
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q11 := 3.5
q_min := root(xc'(q11), q11)
q_min = 3.55311
q11 := 5.98
q_max := root(xc'(q11), q11)
q_max = 5.87167
H11 := |xc(q_max) - xc(q_min)|
H11 = 0.164607
S1(q1) := xc(q1) - xc(q_max)
H11 := 0.165
Given
700 == H11^2*AA + H11*B
1000 == 0.49*H11^2*AA + 0.7*B*H11
Find(AA, B) → [-89203.7255674; 18961.038961]
[AA; B] := [-89203.7255674; 18961.038961]
P(q1) := -{
    AA*S1(q1)^2 + B*S1(q1) if 0 ≤ S1(q1) ≤ H11 and xc'(q1) ≥ 0
    0 otherwise
}
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ρ := 50
m_1 := l1*ρ
g := 9.81
m_2 := 3*m_1
m_U(q1) := l_3*ρ
G_1 := m_1*g
m_BC := Radius*ρ
G_2 := m_2*g
m_duga := π*ρ
m_3(q1) := m_U(q1) + m_BC + m_duga
G_3(q1) := m_3(q1)*g
m_4 := m_duga
G_4 := m_4*g
x_1(q1) := cos(q1)*l1/2
y_1(q1) := sin(q1)*l1/2
y_2(q1) := sin(q1)*l1
x_2(q1) := cos(q1)*l1
x_U(q1) := cos(phi3(q1))*l_3/2
y_U(q1) := -a + sin(phi3(q1))*l_3/2
x_BC(q1) := -cos(phi3(q1))*Radius/2
y_BC(q1) := -sin(phi3(q1))*Radius/2 - a
y_duga(q1) := -sin(phi3(q1))*(4*Radius/(3*π)) - a
x_duga(q1) := -cos(phi3(q1))*(4*Radius/(3*π))
x_3(q1) := (x_U(q1)*m_U(q1) + x_BC(q1)*m_BC + x_duga(q1)*m_duga)/(m_U(q1) + m_BC + m_duga)
y_3(q1) := (y_U(q1)*m_U(q1) + y_BC(q1)*m_BC + y_duga(q1)*m_duga)/(m_U(q1) + m_BC + m_duga)
y_4 := -a - Radius
x_4(q1) := xc(q1)
J_1(q1) := m_1*l1^2/3
J_2 := 0
J_U(q1) := m_U(q1)*U(q1)^2/12
J_BC(q1) := m_BC*Radius^2/12
J_duga(q1) := m_duga*Radius^2/2 - (m_duga*(4*Radius/(3*π))^2)
J_3(q1) := J_U(q1) + m_U(q1)*((x_U(q1) - x_3(q1))^2 + (y_U(q1) - y_3(q1))^2) + J_BC(q1) + m_BC*((x_BC(q1) - x_3(q1))^2 + (y_BC(q1) - y_3(q1))^2) + J_duga(q1) + m_duga*((y_duga(q1) - y_3(q1))^2 + (x_duga(q1) - x_3(q1))^2)
J_4(q1) := m_4*π^2/12
F_1x := 0
F_1y := 0
M_1 := 0
ω_1 := 15
ε_1 := 0
F_2x(q1) := -m_2*ω_1^2*d^2/dq1^2(x_2(q1))
F_2y(q1) := -m_2*ω_1^2*d^2/dq1^2(y_2(q1))
M_2 := 0
F_3x(q1) := -m_3(q1)*ω_1^2*d^2/dq1^2(x_3(q1))
F_3y(q1) := -m_3(q1)*ω_1^2*d^2/dq1^2(y_3(q1))
M_3(q1) := -J_3(q1)*ω_1^2*d^2/dq1^2(phi3(q1))
F_4x(q1) := -m_4*ω_1^2*d^2/dq1^2(x_4(q1))
F_4y(q1) := 0
M_4(q1) := 0
M_04 == 0
F_4x + P + R_34t == 0
R_34*cos(20 deg) + F_4x + P == 0
R_34t(q1) == -F_4x - P
R_04y - R_34n - G_4 == 0
R_04y - R_34*sin(20 deg) - G_4 == 0
R_34t(q1) := -F_4x(q1) - P(q1)
R_34n(q1) := R_34t(q1)*tan(20 deg)
M_32(q1) == M_23(q1) == 0
F_2x(q1) + R_12x(q1) - R_32(q1)*cos(π/2 - phi3(q1)) == 0
R_12y(q1) + F_2y(q1) - G_2 + R_32*sin(π/2 - phi3(q1)) == 0
-R_23(q1)*U(q1) - F_3x*(y_3(q1) + a) + M_3(q1) + (F_3y(q1) - G_3(q1))*x_3(q1) - R_43t(q1)*Radius == 0
R_43t(q1) := R_34t(q1)
R_23(q1) := (-F_3x(q1)*(y_3(q1) + a) + M_3(q1) + (F_3y(q1) - G_3(q1))*x_3(q1) - R_43t(q1)*Radius)/U(q1)
R_32(q1) := R_23(q1)
R_12x(q1) := R_32(q1)*cos(π/2 - phi3(q1)) - F_2x(q1)
R_12y(q1) := G_2 - F_2y(q1) - R_32(q1)*sin(π/2 - phi3(q1))
Q == R_21x(q1)*sin(q1)*l1 - R_21y(q1)*cos(q1)*l1
x_A(q1) := l1*cos(q1)
y_A(q1) := l1*sin(q1)
R_21x(q1) := R_12x(q1)
R_21y(q1) := R_12y(q1)
Q(q1) := -(R_21x(q1)*y_A(q1)) + R_21y(q1)*x_A(q1)
x'_A(q1) := d/dq1(U(q1)*cos(phi3(q1)))
y'_A(q1) := d/dq1(U(q1)*sin(phi3(q1)))
Q_1(q1) := -(M_3(q1)*phi3'(q1) + F_2x(q1)*x'_A(q1) + (F_2y(q1) - G_2)*y'_A(q1) + F_3x(q1)*(d/dq1(x_3(q1))) + (F_3y(q1) - G_3(q1))*(d/dq1(y_3(q1))) + F_4x(q1)*(d/dq1(x_4(q1))) + P(q1)*xc'(q1))
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# Теперь у меня MathCad, в котором можно комментировать сделанное. Заключительный этап первого курсового проекта
# Здесь, справа, происходит отбрасывание индексов. Смысловой нагрузки нет
n := 60
ω := ω_1
q := 0, 2*π/n .. 2*π - 2*π/n
J1(q) := m_1*l1^2/3
# 1. Выбрать двигатель. Рассчитать ndn, Mdn, s, i ...
Q(q) := -(R_21x(q)*y_A(q)) + R_21y(q)*x_A(q)
m2 := m_2
x2(q) := cos(q)*l1
y2(q) := sin(q)*l1
Nt := ω*sqrt(sum(Q(q)^2, q)/n)
Nt = 7604.13
m_U(q) := l_3*ρ
U(q) := sqrt(l1^2 + a^2 + 2*a*l1*sin(q))
# Типоразмер двигателя 2ПН200L
N := 11000
ndn := 800
I := 53
R := 0.125
Lя := 0.0046
Jp := 0.3
Ju(q) := m_U(q)*U(q)^2/12
x_U(q) := cos(phi3(q))*l_3/2
y_U(q) := -a + sin(phi3(q))*l_3/2
ωeng := ndn*2*π/60 = 83.7758
ωxx := ωeng*220/(220 - R*I) = 86.3769
Mdn := N/ωeng = 131.303
sd := Mdn/(ωxx - ωeng) = 50.4793
i := (ωeng/ω) = 5.58505
x_BC(q) := -cos(phi3(q))*Radius/2
y_BC(q) := -sin(phi3(q))*Radius/2 - a
s := sd*i^2 = 1574.59
y_duga(q) := -sin(phi3(q))*(4*Radius/(3*π)) - a
x_duga(q) := -cos(phi3(q))*(4*Radius/(3*π))
τ := Lя/R = 0.0368
Meng(ωeng) := s*ωxx - s*ωeng  # Не понимаю, этого момента при неизменной скорости двигателя
dq := 0, 0.05 .. ωxx/Lя
Qs(dq) := i*s*ωxx - s*dq*i
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# 2. Определить приведённый момент инерции J(q)  построить график
x_3(q) := (x_U(q)*m_U(q) + x_BC(q)*m_BC + x_duga(q)*m_duga)/(m_U(q) + m_BC + m_duga)
y_3(q) := (y_U(q)*m_U(q) + y_BC(q)*m_BC + y_duga(q)*m_duga)/(m_U(q) + m_BC + m_duga)
Jpm(q) := 10*J1(q)
J_duga(q) := m_duga*Radius^2/2 - (m_duga*(4*Radius/(3*π))^2)
J_BC(q) := m_BC*Radius^2/12
J3(q) := Ju(q) + m_U(q)*((x_U(q) - x_3(q))^2 + (y_U(q) - y_3(q))^2) + J_BC(q) + m_BC*((x_BC(q) - x_3(q))^2 + (y_BC(q) - y_3(q))^2) + J_duga(q) + m_duga*((y_duga(q) - y_3(q))^2 + (x_duga(q) - x_3(q))^2)
phi3(q) := acos(l1*cos(q)/sqrt(l1^2 + 2*l1*sin(q)*a + a^2))
m_3(q) := m_U(q) + m_BC + m_duga
x4(q) := xc(q)
y4(q) := -a - Radius
m4 := m_duga
G2(q) := m2*g
xc(q) := (alpha0 + alpha(q))*Radius
G3(q) := m_3(q)*g
S1(q) := xc(q) - xc(q_max)
y3(q) := y_3(q)
xc'(q) := d/dq(xc(q))
x3(q) := x_3(q)
P(q) := -{
    AA*S1(q)^2 + B*S1(q) if 0 ≤ S1(q) ≤ H11 and xc'(q) ≥ 0
    0 otherwise
}
y2(q) := sin(q)*l1
# Составление уравнения Лагранжа
J(q) := Jp*(ωeng/ω)^2 + Jpm(q) + J1(q) + m2*((d/dq(x2(q)))^2 + (d/dq(y2(q)))^2) + J3(q)*(d/dq(phi3(q)))^2 + m4*((d/dq(x4(q)))^2 + ((d/dq(y4(q)))^2))
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# Среднее значение приведённого момента инерции
J0 := sum(J(q), q)/n = 13.6097
# 3. Определить приведённый момент сопротивления, построить график
Qc(q) := P(q)*xc'(q) - G3(q)*(d/dq(y3(q))) - G2(q)*(d/dq(y2(q)))
# Среднее значения приведённого момента сопротивления
Qc0 := sum(Qc(q), q)/n = -19.771
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# 4. Найти нулевые приближения ω0 и Q0
Q0 := -Qc0 = 19.771
ω0 := -(Q0 - i*s*ωxx)/(s*i^2) = 15.4653
# 5. Разложить в ряд возмущающий момент L(q), перейти ко времени, построить L(t)
L(q) := -1/2*(d/dq(J(q)))*ω0^2 + Qc(q) - Qc0
k := 1 .. 5
q := 0, 2*π/n .. 2*π - 2*π/n
Lck := 2/n*sum(L(q)*cos(k*q), q)  # error: This value must be a scalar or a matrix.
Lsk := 2/n*sum(L(q)*sin(k*q), q)  # error: This value must be a scalar or a matrix.
Ld(q) := sum(Lck*cos(k*q) + Lsk*sin(k*q), k)  # error: This variable is undefined.
